*Heading
** Job name: Tension_5X5 Model name: Tension_Std
** Generated by: Abaqus/CAE 2017
*Preprint, echo=NO, model=NO, history=NO, contact=NO
**
** PARTS
**
*Part, name=PART-1
*Node
1, 0.000000, 0.000000, 0.000000
2, 20.000000, 0.000000, 0.000000
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
*Element, type=B21
1, 1, 2
2, 1, 17
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*Elset, elset=SET-2, generate
1, 36658, 1
** Section: Section-1-SET-2  Profile: Profile-1
*Beam Section, elset=SET-2, material=ALUM, temperature=GRADIENTS, section=CIRC
0.275
0.,0.,-1.
9
*End Part
**
**
** ASSEMBLY
**
*Assembly, name=Assembly
**
*Instance, name=PART-1-1, part=PART-1
*End Instance
**
*Node
1, 300, 300, 300
*Node
2, 300, 350, 300
*Node
3, 350, 300, 300
*Node
4, 300, 300, 350
*Nset, nset=m1
1
*Nset, nset=n2
2
*Nset, nset=n1
3
*Nset, nset=n3
4
*Nset, nset=TOP, instance=PART-1-1
241, 242, 243, 244, 245, 246
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*Nset, nset=BOTTOM, instance=PART-1-1
1, 2, 3, 4, 5, 6
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*Nset, nset=LEFT, instance=PART-1-1
1, 17, 33, 49, 65, 81
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*Nset, nset=RIGHT, instance=PART-1-1
16, 32, 48, 64, 80, 96
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*Nset, nset=FRONT, instance=PART-1-1
3841, 3842, 3843, 3844, 3845, 3846
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*Nset, nset=BACK, instance=PART-1-1
1, 2, 3, 4, 5, 6
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*Surface, type=NODE, name=RIGHT_CNS_, internal
RIGHT, 1
*Surface, type=NODE, name=TOP_CNS_, internal
TOP, 1
** Constraint: eqX1
*Equation
2
RIGHT, 1, 1.
m1, 1, -1.
** Constraint: eqY1
*Equation
2
TOP, 2, 1.
m1, 2, -1.
** Constraint: eqZ1
*Equation
2
FRONT, 3, 1.
m1, 3, -1.
** Constraint: eqX2
*Equation
2
LEFT, 1, -1.
m1, 1, -1.
** Constraint: eqY2
*Equation
2
BOTTOM, 2, -1.
m1, 2, -1.
** Constraint: eqZ2
*Equation
2
BACK, 3, -1.
m1, 3, -1.
*MPC, user, mode=DOF
1, n1, m1, n2
1, n3, m1, n2
*Spring, elset=Springs/Dashpots-1-spring

20.79
*Element, type=SpringA, elset=Springs/Dashpots-1-spring
1, 1, 2
2, 1, 3
3, 1, 4
*End Assembly
*Amplitude, name=AMP-1
             0.,              0.,            0.1,             25,
**
** MATERIALS
**
*Material, name=ALUM
*Density
 2.7e-09,
*Elastic
71300., 0.3
*Plastic
  168.,         0.
 168.7, 0.00198028
 178.9, 0.00349223
 189.2,  0.0059659
 199.7, 0.00990404
 210.5,  0.0160172
 221.6,  0.0252826
 233.3,  0.0390052
 245.7,   0.058868
  259.,  0.0869541
 273.6,   0.125711
  290.,   0.177828
** ----------------------------------------------------------------
**
** STEP: Step-1
**
*Step, name=Step-1, nlgeom=YES, inc=1000
*Static
1e-6, 1., 1e-20, 0.01
**
** BOUNDARY CONDITIONS
** Name: BC-1 Type: Displacement/Rotation
*Boundary
n2, 2, 2, 150
** OUTPUT REQUESTS
**
*Restart, write, frequency=0
**
** FIELD OUTPUT: F-Output-1
**
*Output, field
*Node Output
RF, U
*Element Output, directions=YES
LE, PE, PEEQ, S
**
** HISTORY OUTPUT: H-Output-1
**
*Output, history
*Energy Output
ALLIE, ALLKE
*End Step
