*Heading
** Job name: FCC_12X16_per Model name: FCC_12X16_per
** Generated by: Abaqus/CAE 2018
*Preprint, echo=NO, model=NO, history=NO, contact=NO
**
** PARTS
**
*Part, name=Part-1
*End Part
**
**
** ASSEMBLY
**
*Assembly, name=Assembly
**
*Instance, name=Part-1-1, part=Part-1
*Node
      1,         220.,         300.
      2,         220.,         320.
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*Element, type=B21
 1,   1, 414
 2, 414, 415
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*Nset, nset=AllPartSet, generate
     1,  18225,      1
*Elset, elset=AllPartSet, generate
     1,  18992,      1
** Section: BeamSec  Profile: Circ
*Beam Section, elset=AllPartSet, material=Material-3, temperature=GRADIENTS, section=CIRC
0.258378
0.,0.,-1.
*End Instance
**
*Nset, nset=Set-bottom, instance=Part-1-1
   325,   327,   328,   331,   332,   340
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*Nset, nset=Set-left, instance=Part-1-1
   161,   162,   201,   272,   279,   285
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*Nset, nset=Set-right, instance=Part-1-1
     3,    23,    24,    27,    60,    62
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*Nset, nset=Set-top, instance=Part-1-1
     2,     3,    18,    21,   170,   171
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*End Assembly
*Amplitude, name=Amp-1
             0.,              0.,             0.1,            1.92
**
** MATERIALS
**
*Material, name=Material-3
*Damage Initiation, criterion=DUCTILE
 0.0275443, 0.33333,      0.
*Damage Evolution, type=DISPLACEMENT
          0.,          0.
 0.000135464, 0.000706569
   0.0311039,   0.0107066
     0.11634,   0.0207066
    0.255845,   0.0307066
    0.449617,   0.0407066
    0.697658,   0.0507066
          1.,   0.0607066
*Density
 2.7e-09,
*Elastic
70000., 0.3
*Plastic
    134.,         0.
  135.97, 0.00282758
 137.325, 0.00445821
 138.261, 0.00654484
 138.321, 0.00864398
 138.381,  0.0107431
 138.441,  0.0128423
 138.501,  0.0149414
 138.561,  0.0170406
 138.621,  0.0191497
 138.681,  0.0212488
 138.741,   0.023348
 138.801,  0.0254471
    139.,  0.0275443
** ----------------------------------------------------------------
**
** STEP: Step-1
**
*Step, name=Step-1, nlgeom=YES
*Dynamic, Explicit
, 0.1
*Bulk Viscosity
0.06, 1.2
**
** BOUNDARY CONDITIONS
**
** Name: BC-1 Type: Displacement/Rotation
*Boundary, amplitude=Amp-1
Set-top, 1, 1
Set-top, 2, 2, 1.
Set-top, 6, 6
** Name: BC-2 Type: Displacement/Rotation
*Boundary, amplitude=Amp-1
Set-bottom, 1, 1
Set-bottom, 2, 2
Set-bottom, 6, 6
**
** OUTPUT REQUESTS
**
*Restart, write, number interval=1, time marks=NO
**
** FIELD OUTPUT: F-Output-1
**
*Output, field, number interval=200
*Node Output
RF, UT
*Element Output, directions=YES
DMICRT, LE, S, SDEG, STATUS
**
** HISTORY OUTPUT: H-Output-1
**
*Output, history
*Energy Output, elset=Part-1-1.AllPartSet
ALLIE, ALLKE, ALLSE
*End Step
