*Heading
** Job name: kagome_27X27per Model name: kagome_27X27_10%
** Generated by: Abaqus/CAE 2018
*Preprint, echo=NO, model=NO, history=NO, contact=NO
**
** PARTS
**
*Part, name=Part-1
*End Part
**
**
** ASSEMBLY
**
*Assembly, name=Assembly
**
*Instance, name=Part-1-1, part=Part-1
*Node
      1,           0.,   467.653717
      2,          10.,   467.653717
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*Element, type=B21
1, 1, 2
2, 2, 3
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*Nset, nset=AllPartSet, generate
    1,  2211,     1
*Elset, elset=AllPartSet, generate
    1,  4280,     1
** Section: BeamSec  Profile: Rect
*Beam Section, elset=AllPartSet, material=Material-5, temperature=GRADIENTS, section=RECT
1., 0.579104
0.,0.,-1.
*End Instance
**
*Node
      1,         106.,   384.346863,           0.
*Node
      2,         106.,   83.3068619,           0.
*Nset, nset=Set-fix, instance=Part-1-1
 1604, 1608, 1612, 1675, 1676, 1677
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*Nset, nset=Set-load, instance=Part-1-1
 150, 152, 154, 155, 156, 157
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*Nset, nset=fixity
 2,
*Nset, nset=load
 1,
*Surface, type=NODE, name=Set-fix_CNS_, internal
Set-fix, 1.
*Surface, type=NODE, name=Set-load_CNS_, internal
Set-load, 1.
** Constraint: couplingFixity
*Coupling, constraint name=couplingFixity, ref node=fixity, surface=Set-fix_CNS_
*Kinematic
** Constraint: couplingLoad
*Coupling, constraint name=couplingLoad, ref node=load, surface=Set-load_CNS_
*Kinematic
*End Assembly
*Amplitude, name=Amp-1
             0.,              0.,             0.1, 140.296115413079
**
** MATERIALS
**
*Material, name=Material-5
*Density
 4.42e-09,
*Elastic
123000., 0.3
*Plastic
   930.,         0.
   932.,      0.002
  949.9, 0.00305977
  967.8, 0.00464408
  985.7, 0.00699504
 1003.6,  0.0104587
 1021.5,  0.0155267
 1039.4,  0.0228928
 1057.3,  0.0335304
 1075.2,  0.0487974
 1093.1,   0.070577
  1111.,   0.101467
*User Defined Field
** ----------------------------------------------------------------
**
** STEP: Step-1
**
*Step, name=Step-1, nlgeom=YES
*Dynamic, Explicit
, 0.1
*Bulk Viscosity
0.06, 1.2
**
** BOUNDARY CONDITIONS
**
** Name: BC-1 Type: Displacement/Rotation
*Boundary, amplitude=Amp-1
load, 1, 1
load, 2, 2, 1.
** Name: BC-2 Type: Displacement/Rotation
*Boundary, amplitude=Amp-1
fixity, 1, 1
fixity, 2, 2
**
** OUTPUT REQUESTS
**
*Restart, write, number interval=1, time marks=NO
**
** FIELD OUTPUT: F-Output-1
**
*Output, field, number interval=200
*Node Output
RF, UT
*Element Output, directions=YES
DMICRT, LE, S, SDEG, STATUS
**
** HISTORY OUTPUT: H-Output-1
**
*Output, history
*Energy Output, elset=Part-1-1.AllPartSet
ALLIE, ALLKE, ALLSE
*End Step
